# OpenSim document version 30000
AnalyzeTool 15_IK_stride2:
  model_file: C:\Users\u0113530\Documents\MuscleTendonEstimator\Examples\Example_TendonEstimator_RunningData\Data\model.osim
  replace_force_set: false
  results_directory: C:\Users\u0113530\Documents\MuscleTendonEstimator\Examples\Example_TendonEstimator_RunningData\Results\MuscleAnalysis
  output_precision: 8
  initial_time: 0.3399961
  final_time: 1.175877
  solve_for_equilibrium_for_auxiliary_states: false
  maximum_number_of_integrator_steps: 20000
  maximum_integrator_step_size: 1
  minimum_integrator_step_size: 1e-8
  integrator_error_tolerance: 1e-5
  coordinates_file: C:\Users\u0113530\Documents\MuscleTendonEstimator\Examples\Example_TendonEstimator_RunningData\Data\15_IK_stride2.mot
  lowpass_cutoff_frequency_for_coordinates: -1
  AnalysisSet Analyses:
    MuscleAnalysis: start_time=0.3399961 end_time=1.175877 step_interval=1 in_degrees=true muscle_list=all
        moment_arm_coordinate_list=(ankle_angle_l knee_angle_l) compute_moments=true
