# OpenSim document version 40000
AnalyzeTool trial_1_IK:
  model_file: C:\Users\u0088756\Documents\FWO\Software\Misc\MuscleTendonEstimator\Examples\Example_trackUS\Data\model.osim
  replace_force_set: false
  results_directory: C:\Users\u0088756\Documents\FWO\Software\Misc\MuscleTendonEstimator\Examples\Example_trackUS\Results\MuscleAnalysis
  output_precision: 8
  initial_time: 2.39
  final_time: 3.59
  solve_for_equilibrium_for_auxiliary_states: false
  maximum_number_of_integrator_steps: 20000
  maximum_integrator_step_size: 1
  minimum_integrator_step_size: 1e-8
  integrator_error_tolerance: 1e-5
  coordinates_file: C:\Users\u0088756\Documents\FWO\Software\Misc\MuscleTendonEstimator\Examples\Example_trackUS\Data\trial_1_IK.mot
  lowpass_cutoff_frequency_for_coordinates: -1
  AnalysisSet Analyses:
    MuscleAnalysis: start_time=2.39 end_time=3.59 step_interval=1 in_degrees=true muscle_list=all
        moment_arm_coordinate_list=(ankle_angle_l knee_angle_l) compute_moments=true
