# OpenSim document version 30000
AnalyzeTool Walking_IK:
  model_file: C:\Users\u0113530\Documents\MuscleTendonEstimator\Examples\Walking_DeGrooteetal2016\WalkingData\subject1.osim
  replace_force_set: false
  results_directory: C:\Users\u0113530\Documents\MuscleTendonEstimator\Examples\Walking_DeGrooteetal2016\Results\MuscleAnalysis
  output_precision: 8
  initial_time: 0.5166667
  final_time: 1.95
  solve_for_equilibrium_for_auxiliary_states: false
  maximum_number_of_integrator_steps: 20000
  maximum_integrator_step_size: 1
  minimum_integrator_step_size: 1e-8
  integrator_error_tolerance: 1e-5
  coordinates_file: C:\Users\u0113530\Documents\MuscleTendonEstimator\Examples\Walking_DeGrooteetal2016\WalkingData\Walking_IK.mot
  lowpass_cutoff_frequency_for_coordinates: -1
  AnalysisSet Analyses:
    MuscleAnalysis: start_time=0.5166667 end_time=1.95 step_interval=1 in_degrees=true muscle_list=all
        moment_arm_coordinate_list=(ankle_angle_r knee_angle_r hip_flexion_r hip_adduction_r hip_rotation_r)
        compute_moments=true
